# -- Polymer in Water

# 1. Initialization
#---------------------
units real                               # mass is g/mol, distance in Å,
atom_style full                       # each atom is a dot with a mass and a charge that can be linked by bonds, angles, dihedrals, and/or impropers.


# 2. System definition
#-----------------------------------
region box block -30 30 -15 15 -15 15
create_box 8 box bond/types 7 angle/types 8 dihedral/types 4 extra/bond/per/atom 3 &
    extra/angle/per/atom 6 extra/dihedral/per/atom 10 extra/special/per/atom 14


# 3. Settings
#---------------------------------
# preparing water reservoir
bond_style harmonic
angle_style harmonic
dihedral_style harmonic
pair_style lj/cut/coul/long 10                                     # using both lennard-jones and coulombic potentials
kspace_style ewald 1e-5                                             # defines the long-range solver for the Coulomb interactions
special_bonds lj 0.0 0.0 0.5 coul 0.0 0.0 1.0 angle yes       # LJ and Coulomb weighting factors for the interaction between neighboring atoms.

include parametric.inc


# 2. System definition
#-----------------------------------
molecule h2omol water.mol
create_atoms 0 random 700 87910 NULL mol h2omol 454756 overlap 1.0 maxtry 50


# 5. Run
#----------------------------
group H2O type OW HW
minimize 1.0e-4 1.0e-6 100 1000
reset_timestep 0


# 5. Run
#----------------------------
fix mynpt all npt temp 300 300 100 iso 1 1 1000

# 4. Monitoring
#----------------------------
dump viz all image 250 data\myimage-*.ppm type type &
shiny 0.1 box no 0.01 view 0 90 zoom 3 size 1000 600
dump_modify viz backcolor white &
acolor OW red acolor HW white &
adiam OW 3 adiam HW 1.5


# 5. Run
#---------------------------
timestep 1.0
run 15000

write_restart water.restart
